*Heading
** Job name: test_block Model name: Model-1
** Generated by: Abaqus/CAE 6.13-4
*Preprint, echo=NO, model=NO, history=NO, contact=NO
**
** PARTS
**
*Part, name=Part-1
*End Part
**
*Part, name=Part-2
*End Part
**
**
** ASSEMBLY
**
*Assembly, name=Assembly
**
*Instance, name=Part-1-1, part=Part-1
*Node
      1,   1.46994257,  0.298778981
      2,   1.38097489,  0.585583925
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*Element, type=CPE3
 1, 1867,  305, 1841
 2, 2000, 2329, 3412
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*Element, type=CPE4
  87,  940,   88,  864,  996
  88, 1591, 1566,  529, 1468
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*Nset, nset=Set-1, generate
    1,  3544,     1
*Elset, elset=Set-1, generate
    1,  3420,     1
** Section: Section-1
*Solid Section, elset=Set-1, material=Material-1
,
*End Instance
**
*Instance, name=Part-2-1, part=Part-2
*Node
      1,   1.46994257,  0.298778981
      2,   1.38097489,  0.585583925
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*Element, type=CPE3
 1, 166, 264, 221
 2, 434, 404, 375
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*Element, type=CPE4
 23,   7, 115, 843,  45
 24, 308, 843, 115, 342
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*Nset, nset=Set-2, generate
   1,  973,    1
*Elset, elset=Set-2, generate
   1,  936,    1
** Section: Section-2
*Solid Section, elset=Set-2, material=Material-2
,
*End Instance
**
*Nset, nset=Bottom, instance=Part-1-1
  93,  94,  95,  96,  97,  98
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*Elset, elset=Bottom, instance=Part-1-1
  161,  163,  297,  299,  517,  561
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*Nset, nset=Left, instance=Part-1-1
  63, 123, 124, 125, 126, 127
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*Elset, elset=Left, instance=Part-1-1
  113,  114,  115,  116,  209,  211
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*Nset, nset=Right, instance=Part-1-1
  62,  64,  65,  66,  67,  68
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*Elset, elset=Right, instance=Part-1-1
   87,  496,  497,  502,  517,  518
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*Nset, nset=Top, instance=Part-1-1
  33,  34,  35,  36,  37,  38
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*Elset, elset=Top, instance=Part-1-1
  119,  121,  358,  362,  364,  365
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*Elset, elset=_Bottom_S2, internal, instance=Part-1-1
  119,  121,  362,  364,  365,  370
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*Elset, elset=_Bottom_S4, internal, instance=Part-1-1
  358,  390,  483,  489,  495, 1360, 1361, 1381, 1383
*Elset, elset=_Bottom_S1, internal, instance=Part-1-1
 468,
*Elset, elset=_Bottom_S3, internal, instance=Part-1-1
 502,
*Surface, type=ELEMENT, name=Bottom
_Bottom_S2, S2
_Bottom_S4, S4
_Bottom_S1, S1
_Bottom_S3, S3
*Elset, elset=_Left_S2, internal, instance=Part-1-1
  113,  114,  115,  209,  211,  269
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*Elset, elset=_Left_S4, internal, instance=Part-1-1
  116,  250,  259,  359,  360,  780
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*Elset, elset=_Left_S3, internal, instance=Part-1-1
 358,
*Elset, elset=_Left_S1, internal, instance=Part-1-1
 879,
*Surface, type=ELEMENT, name=Left
_Left_S2, S2
_Left_S4, S4
_Left_S3, S3
_Left_S1, S1
*Elset, elset=_Right_S2, internal, instance=Part-1-1
   87,  496,  497,  521,  522,  525
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*Elset, elset=_Right_S4, internal, instance=Part-1-1
  502,  518,  519,  520,  544,  944, 1384, 1385, 1386, 1387, 1388, 1389, 1403, 1406, 1409
*Elset, elset=_Right_S3, internal, instance=Part-1-1
 517,
*Elset, elset=_Right_S1, internal, instance=Part-1-1
 523, 524
*Surface, type=ELEMENT, name=Right
_Right_S2, S2
_Right_S4, S4
_Right_S3, S3
_Right_S1, S1
*Elset, elset=_Top_S2, internal, instance=Part-1-1
  161,  163,  297,  299,  561,  585
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*Elset, elset=_Top_S4, internal, instance=Part-1-1
  517,  672,  757,  764,  771, 1411, 1412, 1424, 1429, 1434
*Elset, elset=_Top_S1, internal, instance=Part-1-1
 737,
*Elset, elset=_Top_S3, internal, instance=Part-1-1
 780,
*Surface, type=ELEMENT, name=Top
_Top_S2, S2
_Top_S4, S4
_Top_S1, S1
_Top_S3, S3
*End Assembly
**
** MATERIALS
**
*Material, name=Material-1
*Elastic
 0.1, 0.3
*Material, name=Material-2
*Elastic
 0.05, 0.3
** ----------------------------------------------------------------
**
** STEP: Step-1
**
*Step, name=Step-1, nlgeom=NO
*Static
1., 1., 1e-05, 1.
**
** OUTPUT REQUESTS
**
*Restart, write, frequency=0
**
** FIELD OUTPUT: F-Output-1
**
*Output, field, variable=PRESELECT
**
** HISTORY OUTPUT: H-Output-1
**
*Output, history, variable=PRESELECT
*End Step
