*Heading
** Job name: ht2 Model name: Model-1
** Generated by: Abaqus/CAE 6.13-4
*Preprint, echo=NO, model=NO, history=NO, contact=NO
**
** PARTS
**
*Part, name=Part-1
*End Part
**
**
** ASSEMBLY
**
*Assembly, name=Assembly
**
*Instance, name=Part-1-1, part=Part-1
*Node
      1,           0.,           0.
      2, 3.00000011e-06,           0.
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*Element, type=DC2D4
   1,    1,    2,  103,  102
   2,    2,    3,  104,  103
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*Nset, nset=Set-1, generate
    1,  5151,     1
*Elset, elset=Set-1, generate
    1,  5000,     1
** Section: Section-1
*Solid Section, elset=Set-1, material=Material-1
1.,
*End Instance
**
*Nset, nset=Set-1, instance=Part-1-1, generate
    1,  5151,     1
*Elset, elset=Set-1, instance=Part-1-1, generate
    1,  5000,     1
*Elset, elset=_Surf-1_S1, internal, instance=Part-1-1, generate
   1,  100,    1
*Surface, type=ELEMENT, name=Surf-1
_Surf-1_S1, S1
*End Assembly
**
** MATERIALS
**
*Material, name=Material-1
*Conductivity
 1e-10,
*Density
1.,
*Specific Heat
1.,
**
** PREDEFINED FIELDS
**
** Name: Predefined Field-1   Type: Temperature
*Initial Conditions, type=TEMPERATURE
Set-1, 0.0078
** ----------------------------------------------------------------
**
** STEP: Step-1
**
*Step, name=Step-1, nlgeom=NO, inc=10
*Heat Transfer, end=PERIOD
1., 10., , ,
**
** LOADS
**
** Name: Load-1   Type: Surface heat flux
*Dsflux
Surf-1, S, 1e-06
**
** OUTPUT REQUESTS
**
*Restart, write, frequency=0
**
** FIELD OUTPUT: F-Output-1
**
*Output, field, variable=PRESELECT
*Output, history, frequency=0
*End Step
